// COMSOL Multiphysics 6.1.0.252 model "TVDM.mph"
// Outline of the model tree

Parameters
  T0 = 350[degC]
  TFinal = 15[degC]
  alpha = 7.5e-6[1/K]
  rho = 3980[kg/m^3]
  k = 31[W/m/K]
  c = 880[J/kg/K]
  Hint = 0[J/m^3]
  E0 = 370[GPa]
  Nu = 0.22
  Gc = 42.47[J/m^2]
  l0 = 0.12[mm]
  E_bar = E0*(1-Nu)/(1-2*Nu)/(1+Nu)
  mu = E0/(2*(1+v0))  // Lama Paramter1
  lanta = E0*v0/((1+v0)*(1-2*v0))  // Lama Paramter2
  v0 = Nu

Variables
  var1 "Variables 1"
    e_T = solid.eth11
    e1_p = if(solid.ep1-e_T>0,solid.ep1-e_T,0)
    e2_p = if(solid.ep2-e_T>0,solid.ep2-e_T,0)
    e3_p = if(solid.ep3-e_T>0,solid.ep3-e_T,0)
    tra1 = solid.ep1+solid.ep2+solid.ep3-3*e_T
    tra1_p = if(tra1>0,tra1,0)
    fai_p = lanta*tra1_p^2/2+mu*(e1_p^2+e2_p^2+e3_p^2)
    d = 1/(1+Gc/l0/H)
    omega = 1/(1+l0*H/Gc)/(1+l0*H/Gc)
    H = max(Hint,Hmax)

Common definitions
  state1: StateVariables on domains 1
    state = Hmax
    initialValue = 0
    updateExpression = max(Hmax,fai_p)
    order = 6
    update = afterStep

Geometry
  geom1 "Geometry 1" (3D, length unit m)
    cyl1: Cylinder | r = 6.5[mm]; h = 1[mm]
    blk1: Block "长方体 1" | size = {6.5[mm], 6.5[mm], 1[mm]}
    int1: Intersection "交集 1" | input = blk1, cyl1
    fin: Finalize "Form Union"

Physics
  solid: SolidMechanics on all domains
    dependent variable u = {u, v, w}
    ShapeProperty.order_displacement = 1
    StructuralTransientBehavior.StructuralTransientBehavior = Quasistatic
    lemm1: LinearElasticModel "Linear Elastic Material 1" (default)
      E_mat = userdef
      E = E0*omega
      nu_mat = userdef
      nu = v0
      rho_mat = userdef
      rho = rho
      te1: ThermalExpansion on all domains
        alpha_mat = userdef
        alpha = alpha
        minput_strainreferencetemperature = T0
        minput_temperature = T
    free1: Free (default)
    init1: init "Initial Values 1" (default)
    sym1: SymmetrySolid "对称 1" on boundaries 2
    disp6: Displacement0 "指定位移 6" on points 2 | Direction = {0, 0, 1}
    sym2: SymmetrySolid "对称 2" on boundaries 1
  ht: HeatTransfer "Heat Transfer in Solids" on all domains
    dependent variable T
    ShapeProperty.order_temperature = 1
    solid1: SolidHeatTransferModel "Solid 1" (default)
      k_mat = userdef
      k = k
      rho_mat = userdef
      rho = rho
      Cp_mat = userdef
      Cp = c
    init1: init "Initial Values 1" (default) | Tinit = T0
    ins1: ThermalInsulation (default)
    temp1: TemperatureBoundary "Temperature 1" on boundaries 5 | T0 = TFinal

Mesh
  mesh1 "Mesh 1"
    size: MeshSizeDefault | hmax = 0.08[mm]; hmin = 0.08[mm]; hcurve = 0.2; hgrad = 1.3; hauto = 1; custom = on
    ftet1: FreeTet "自由四面体网格 1" on remaining entities

Studies
  std1 "Study 1"
    time: Transient "Time Dependent" | tlist = range(0,0.0001,0.2); usertol = on; rtol = 1e-5

Solver configurations
  sol1 "Solution 1" (study std1)
    v1: Variables "Dependent Variables 1"
      comp1_u: Field "位移场 (comp1.u)" | scalemethod = manual; scaleval = 1e-2*0.0184119526395
    t1: Time "Time-Dependent Solver 1"
      tlist = range(0,0.0001,0.2)
      tout = tsteps
      tstepsstore = 50
      rtol = 1e-5
      atolglobalvaluemethod = manual
      atolmethod = {comp1_state1, global, comp1_T, global, comp1_u, global}
      atolvaluemethod = {comp1_state1, factor, comp1_T, factor, comp1_u, factor}
      atol = {comp1_state1, 1e-3, comp1_T, 1e-3, comp1_u, 1e-3}
      timemethod = genalpha
      maxorder = 2
      estrat = exclude
      initialstepgenalpha = 0.00001
      maxstepconstraintgenalpha = const
      maxstepgenalpha = 0.0005
      se1: Segregated | segstabacc = segaacc; segaaccdim = 5; segaaccmix = 0.9
        ss1: SegregatedStep "Temperature" | segvar = {comp1_T}; linsolver = d1; subdamp = 0.8; subjtech = once
        ss2: SegregatedStep "Solid Mechanics" | segvar = {comp1_u}; linsolver = d2
        ss3: SegregatedStep | segvar = {comp1_state1}
      d1: Direct "Direct, heat transfer variables (ht)" | linsolver = pardiso; pivotperturb = 1.0E-13
      d2: Direct "Suggested Direct Solver (solid)" | linsolver = pardiso; pivotperturb = 1.0E-9

Datasets
  dset1: Solution | solution = sol1
  mir1: Mirror3D "三维镜像 1" | data = dset1
  mir2: Mirror3D "三维镜像 2" | data = mir1; quickplane = zx

Plots
  pg1: PlotGroup3D "damage" | data = mir2
    vol1: Volume | expr = d
  pg2: PlotGroup3D "temperature" | data = mir2
    vol1: Volume "体 1" | expr = T; unit = degC; descr = 温度